// COMSOL Multiphysics 5.2.0.220 model "labyrinthine3_matlab.mph"
// Outline of the model tree

Parameters
  W = 0.1
  H = 0.025
  a1 = 0.005
  b1 = 0.003
  a2 = 0.005
  b2 = 0.009
  a3 = 0.009
  b3 = 0.015
  b4 = 0.0084
  a4 = 0.006
  a5 = 0.006
  b5 = 0.0117

Variables
  var1 "Variables 1"
    p_i = exp(-1i*acpr.k*x)[Pa]
    s11 = intop1(acpr.p_t-p_i)/intop1(p_i)
    s21 = intop2(acpr.p_t)/intop1(p_i)

Couplings
  intop1: Integration on boundaries 1
  intop2: Integration on boundaries 16

Geometry
  geom1 "Geometry 1" (2D, length unit m)
    r1: Rectangle | pos = {0, 0}; base = center; size = {W, H}
    b1: BezierPolygon "Bézier Polygon 1" | contributeto = csel1; p = {{-b1, -b1}, {H/2-a1, -H/2}}; degree = 1; w = {1, 1}
    b2: BezierPolygon "Bézier Polygon 2" | contributeto = csel1; p = {{-b2, -b2}, {H/2, a2-H/2}}; degree = 1; w = {1, 1}
    b3: BezierPolygon "Bézier Polygon 3" | contributeto = csel1; p = {{-b3, -b3}, {H/2-a3, -H/2}}; degree = 1; w = {1, 1}
    rot1: Rotate | input = b1(1), b2(1), b3(1); keep = on; rot = 180
    b4: BezierPolygon "Bézier Polygon 4" (disabled)
      contributeto = csel1
      p = {{-b4, -b4}, {H/2-a4, -H/2}}
      degree = 1
      w = {1, 1}
    b5: BezierPolygon "Bézier Polygon 5" (disabled)
      contributeto = csel1
      p = {{-b5, -b5}, {H/2, a5-H/2}}
      degree = 1
      w = {1, 1}
    rot2: Rotate (disabled) | input = b1(1), b2(1), b3(1), rot1(1), rot1(2), rot1(3); keep = on; rot = 180
    fin: Finalize "Form Union"

Materials
  mat1: Common "Air 1" on all domains
    def "Basic"
      density = 1.25*(1-0.005*i)
      soundspeed = 343/(1-0.005*i)

Physics
  acpr: PressureAcoustics "Pressure Acoustics, Frequency Domain" on domains 1
    dependent variable p
    fpam1: FrequencyPressureAcousticsModel "Pressure Acoustics 1" (default)
    shb1: SoundHard "Sound Hard Boundary (Wall) 1" (default)
    init1: init "Initial Values 1" (default)
    pwr1: PlaneWaveRadiation on boundaries 1, 16
      ipf1: IncidentPressureField on boundaries 1-3, 5, 7, 9, 11, 13, 15 | dir = {1, 0, 0}; pamp = 1
    ishb1: InteriorSoundHard "Interior Sound Hard Boundary (Wall) 1" on boundaries 4, 6, 8, 10, 12, 14

Mesh
  mesh1 "Mesh 1" (physics-controlled)
    size: MeshSizeDefault | hauto = 2

Studies
  std1 "Study 1"
    freq: Frequency "Frequency Domain" | punit = Hz; plist = range(100,100,4000)